<neuroml xmlns="http://www.neuroml.org/schema/neuroml2"  xmlns:xs="http://www.w3.org/2001/XMLSchema" xmlns:xsi="http://www.w3.org/2001/XMLSchema-instance" xsi:schemaLocation="http://www.neuroml.org/schema/neuroml2 https://raw.github.com/NeuroML/NeuroML2/development/Schemas/NeuroML2/NeuroML_v2beta5.xsd" id="network_325941643_Izh">
    <include href="Izh.cell.nml"></include>
    <pulseGenerator id="input_34" delay="270ms" duration="1000ms" amplitude="-29.9999990128 pA"/>
    <pulseGenerator id="input_36" delay="270ms" duration="1000ms" amplitude="9.99999996004 pA"/>
    <pulseGenerator id="input_39" delay="270ms" duration="1000ms" amplitude="69.9999988529 pA"/>
    <pulseGenerator id="input_41" delay="270ms" duration="1000ms" amplitude="110.000002163 pA"/>
    <pulseGenerator id="input_43" delay="270ms" duration="1000ms" amplitude="149.999998533 pA"/>
    <pulseGenerator id="input_46" delay="270ms" duration="1000ms" amplitude="210.000003498 pA"/>
    <pulseGenerator id="input_48" delay="270ms" duration="1000ms" amplitude="249.99999293 pA"/>
    <network id="network_325941643_Izh" type="networkWithTemperature" temperature="34 degC">
        <population id="Pop0" component="RS" size="7" type="populationList">
            <instance id="0">
                <location x="0." y="0." z="0."/>
            </instance>
            <instance id="1">
                <location x="100." y="0." z="0."/>
            </instance>
            <instance id="2">
                <location x="200." y="0." z="0."/>
            </instance>
            <instance id="3">
                <location x="300." y="0." z="0."/>
            </instance>
            <instance id="4">
                <location x="400." y="0." z="0."/>
            </instance>
            <instance id="5">
                <location x="500." y="0." z="0."/>
            </instance>
            <instance id="6">
                <location x="600." y="0." z="0."/>
            </instance>
        </population>
        <inputList id="input_34" population="Pop0" component="input_34">
            <input id="0" target="../Pop0/0/RS" destination="synapses"/>
        </inputList>
        <inputList id="input_36" population="Pop0" component="input_36">
            <input id="0" target="../Pop0/1/RS" destination="synapses"/>
        </inputList>
        <inputList id="input_39" population="Pop0" component="input_39">
            <input id="0" target="../Pop0/2/RS" destination="synapses"/>
        </inputList>
        <inputList id="input_41" population="Pop0" component="input_41">
            <input id="0" target="../Pop0/3/RS" destination="synapses"/>
        </inputList>
        <inputList id="input_43" population="Pop0" component="input_43">
            <input id="0" target="../Pop0/4/RS" destination="synapses"/>
        </inputList>
        <inputList id="input_46" population="Pop0" component="input_46">
            <input id="0" target="../Pop0/5/RS" destination="synapses"/>
        </inputList>
        <inputList id="input_48" population="Pop0" component="input_48">
            <input id="0" target="../Pop0/6/RS" destination="synapses"/>
        </inputList>
    </network>
</neuroml>
