// SBML level 2 version 2
// This SBML file has been generated by org.neuroml.export (see https://github.com/NeuroML/org.neuroml.export) org.neuroml.export v1.10.0 org.neuroml.model v1.10.0 jLEMS v0.11.0 Export of model: Components: FN (Type: fitzHughNagumo1969Cell: a=0.7 (dimensionless) b=0.8 (dimensionless) I=1.0 (dimensionless) phi=0.08 (dimensionless) V0=0.0 (dimensionless) W0=0.0 (dimensionless) TS=0.001 (SI time)) net1 (Type: network) sim1 (Type: Simulation: length=0.4 (SI time) step=1.0E-5 (SI time))

model net1()

  // Compartments:
  compartment fn1pop_0 = 1;

  // Parameters:
  a = 0.7;
  b = 0.8;
  I = 1;
  phi = 0.08;
  V0 = 0;
  W0 = 0;
  TS = 0.001;
  V = V0;
  W = W0;

  // Assignment rules:
  F := V - V^3/3;

  // Rate rules:
  V' = (F - W + I)/TS;
  W' = phi*((V + (a - b*W))/TS);
end
