<Lems>

    <Target component="sim1" reportFile="report.txt"/>

    <Include file="Cells.xml"/>
    <Include file="Networks.xml"/>
    <Include file="Simulation.xml"/>

    <!-- Including file with a <neuroml> root, a "real" NeuroML 2 file -->
    <Include file="TestNet.net.nml"/>
    <Include file="ICG_channels.xml"/>

    <Simulation id="sim1" length="300ms" step="0.01ms" target="net1">

        <Display id="d1" title="Ex5: HH cell with simple morphology: voltage" timeScale="1ms" xmin="0" xmax="300" ymin="-90" ymax="50">
                <Line id="v" quantity="hhpop[0]/v" scale="1mV" color="#cccccc" timeScale="1ms"/>
        </Display>

        <Display id="d2" title="Ex5: HH cell with simple morphology: rate variables" timeScale="1ms" xmin="0" xmax="300" ymin="-0.1" ymax="1.1">
                <Line id="n_orig" quantity="hhpop[0]/bioPhys1/membraneProperties/kChans/kChan/n/q" scale="1"  color="#0000ff" timeScale="1ms"/>
                <Line id="n_new" quantity="hhpop[0]/bioPhys1/membraneProperties/test_kchan_icg_Chans/test_kchan_icg/n/q" scale="1"  color="#0000ff" timeScale="1ms"/>
        </Display>

        <Display id="d3" title="inf" timeScale="1ms" xmin="0" xmax="300" ymin="-0.1" ymax="1.1">
                <Line id="n_orig" quantity="hhpop[0]/bioPhys1/membraneProperties/kChans/kChan/n/inf" scale="1"  color="#0000ff" timeScale="1ms"/>
                <Line id="n_new" quantity="hhpop[0]/bioPhys1/membraneProperties/test_kchan_icg_Chans/test_kchan_icg/n/inf" scale="1"  color="#0ff0ff" timeScale="1ms"/>
        </Display>

        <Display id="d4" title="tau" timeScale="1ms" xmin="0" xmax="300" ymin="-1" ymax="11">
                <Line id="n_orig" quantity="hhpop[0]/bioPhys1/membraneProperties/kChans/kChan/n/tau" scale="1ms"  color="#0000ff" timeScale="1ms"/>
                <Line id="n_new" quantity="hhpop[0]/bioPhys1/membraneProperties/test_kchan_icg_Chans/test_kchan_icg/n/tau" scale="1ms"  color="#0ff0ff" timeScale="1ms"/>
        </Display>
        <!--
        <Display id="d3" title="Ex5: HH cell with simple morphology: current densities" timeScale="1ms" xmin="0" xmax="300" ymin="-0.1" ymax="1.1">
                <Line id="ina" quantity="hhpop[0]/bioPhys1/membraneProperties/naChans/iDensity" scale="1"  color="#000000" timeScale="1ms"/>
                <Line id="ik" quantity="hhpop[0]/bioPhys1/membraneProperties/kChans/iDensity" scale="1"  color="#ff0000" timeScale="1ms"/>
        </Display>

        <Display id="d4" title="Ex5: HH cell with simple morphology: conductance densities" timeScale="1ms" xmin="0" xmax="300" ymin="-50" ymax="350">
                <Line id="gna" quantity="hhpop[0]/bioPhys1/membraneProperties/naChans/gDensity" scale="1"  color="#000000" timeScale="1ms"/>
                <Line id="gk" quantity="hhpop[0]/bioPhys1/membraneProperties/kChans/gDensity" scale="1"  color="#ff0000" timeScale="1ms"/>
        </Display>

        <OutputFile id="of0" fileName="ex_v.dat">
            <OutputColumn id="v" quantity="hhpop[0]/v"/>
        </OutputFile>

        <OutputFile id="of1" fileName="ex_vars.dat">
            <OutputColumn id="m" quantity="hhpop[0]/bioPhys1/membraneProperties/naChans/naChan/m/q"/>
            <OutputColumn id="h" quantity="hhpop[0]/bioPhys1/membraneProperties/naChans/naChan/h/q"/>
            <OutputColumn id="n" quantity="hhpop[0]/bioPhys1/membraneProperties/kChans/kChan/n/q"/>
        </OutputFile>  -->

    </Simulation>

</Lems>
